# Разрешение таймеров 0 и 2 (чтобы хватало на 3 канала) - максимальное значение скважности = 255
FGEN := 7680000
A := 255
# Восстанавливаем 180 точками 1/2 периода
f := 50
N := 90
N*2*50 = 9000
# Каждые
1000/(2*N*f) = 0.111111  # мс задаем новую скважность
1000/(2*N*100) = 0.0555556
1000/(2*N*1) = 5.55556
FGEN/(2*N*f) = 853.333
# Формулы расчета каждого шага
# x - номер шага | n - значение скважности в данной точке
2*N*50 = 9000
x := 0, 1 .. 2*N
n_A(x) := round(A/2 + A/2*sin(π*x/N))
n_B(x) := round(A*sin(π/2*x/N + 2*π/3))
n_C(x) := round(A*sin(π/2*x/N + 4*π/3))
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round(A*sin(π/2*x/(0.5*N))) = [
    0; 9; 18; 27; 35; 44; 53; 62; 70; 79
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]
(1*sin(π/2*x/(0.5*N))) = [
    0; 0.0348995; 0.0697565; 0.104528; 0.139173; 0.173648; 0.207912; 0.241922; 0.275637; 0.309017
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]
0.5 + 0.5*sin(π*x/N) float, 3 → [
    0.5; 0.517; 0.535; 0.552; 0.57; 0.587; 0.604; 0.621; 0.638; 0.655
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]
